X22(x) := -sqrt(4*x) + x
x21 := 0.53589838
x22 := 7.46410161
X22(x21) = -0.928203
X2 := X22(x22) = 2  # Подходит только x2
x1 := 4*x22 = 29.8564
x1 - 4*x22 = 0
x2 := x22 = 7.4641
-1/(2*sqrt(x1)) = -0.0915064
Fx1(x1, x2) := -sqrt(x1) + x2
Fx2(x1, x2) := x1 - 4*x2
Fx1(x1, x22) = 2
Fx2(x1, x22) = 0
