A := [0, 1, 0; 0, 0, 1; -1, -1, -2]
B := [0, 0, 0; 0, 0, 0; 0, 1, -0.5]
E := [1, 0, 0; 0, 1, 0; 0, 0, 1]
Δt := 0.05
ΔA := E + Δt*A = [1, 0.05, 0; 0, 1, 0.05; -0.05, -0.05, 0.9]
ΔB := Δt*B = [0, 0, 0; 0, 0, 0; 0, 0.05, -0.025]
z^-1*(E - ΔA - z^-1)^-1*ΔB → [
    0, -0.05*(-2.52435489671e70*z + 5e97*z^2 + (-5e96*z^3) + 9.375e94*z^4 + 3.125e93*z^5 + (-7.8125e91*z^6) + 3.18618382226e42)/(z*(-1.26217744835e69*z + 2.5e96*z^2 + (-3.75e95*z^3) + 2.03125e94*z^4 + (-4.6875e92*z^5) + 3.90625e90*z^6 + 1.59309191113e41)), 0.025*(-2.52435489671e70*z + 5e97*z^2 + (-5e96*z^3) + 9.375e94*z^4 + 3.125e93*z^5 + (-7.8125e91*z^6) + 3.18618382226e42)/(z*(-1.26217744835e69*z + 2.5e96*z^2 + (-3.75e95*z^3) + 2.03125e94*z^4 + (-4.6875e92*z^5) + 3.90625e90*z^6 + 1.59309191113e41));
    0, 0.05*(5e49*z + (-2.5e48*z^2) + 50.0)/(z*(5e48*z + (-3.75e47*z^2) + 6.25e45*z^3 - 1.26217744835e21)), -0.025*(5e49*z + (-2.5e48*z^2) + 50.0)/(z*(5e48*z + (-3.75e47*z^2) + 6.25e45*z^3 - 1.26217744835e21));
    0, 0.05*(2e47*z - 1.00974195868e20)*(2.5e48*z + (-1.25e47*z^2))/(z*(-2e47*z + 1e46*z^2)*(-2.5e47*z + 6.25e45*z^2 + 6.31088724177e19)), -0.025*(2e47*z - 1.00974195868e20)*(2.5e48*z + (-1.25e47*z^2))/(z*(-2e47*z + 1e46*z^2)*(-2.5e47*z + 6.25e45*z^2 + 6.31088724177e19))
]
