a := 3
k := 2
R(w) := (-(a^2)*k^2 + a*k*w^4 - 17*a*k*w^2 - k^2*w^2 - 8*k*w^4 + 10*k*w^2)/(a^2*k^2 - 2*a*k*w^4 + 34*a*k*w^2 + k^2*w^2 + 16*k*w^4 - 20*k*w^2 + 30*w^6 + 129*w^4 + 100*w^2 + w^8)
I(w) := (8*a*k*w^3 - 10*a*k*w + k*w^5 - 17*k*w^3)/(a^2*k^2 - 2*a*k*w^4 + 34*a*k*w^2 + k^2*w^2 + 16*k*w^4 - 20*k*w^2 + 30*w^6 + 129*w^4 + 100*w^2 + w^8)
w := 2 .. 200
1/2*sqrt(5)*sqrt(a/(a - 2)) = 1.93649
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